1050/30 = 35
w := 1050
h := 860
100 + □
q := 15
r := 17
860/20 = 43
(w + 10)/q = 70.6667
h/r = 50.5882
50*2 + 50*7 + 100*6 = 1050
50*q1 + 50*q2 + 100*q3 == w
q == q1 + q2 + 2*q3
d := sqrt(150^2 + 86^2)/2 = 86.4523
[50*q1 + 50*q2 + 100*q3 == w; q == q1 + q2 + 2*q3; □]
86*10 = 860
q_1 == 1 + 2*w_1/150 solve, w_1 → 75*q_1 - 75
1.7*20 = 34
q(w) := w/75 + 1
w(q) := 75*q - 75
86*10 = 860
r(h) := □  # error: Denne pladsholder er tom.
17/10 = 1.7
r_1 == nq/2 + nq + 2 solve, r_1 → 3*nq/2 + 2
n_1 == 860/86
17*860/86/10 = 17
10/17 == nq/h_1 solve, h_1 → 17*nq/10
17/10 == n_x/n_1 solve, n_x → 17*n_1/10
nq(h_1) := 10*h_1/17
h_1(nq) := 17*nq/10
nq(h) = 505.882
h_1(50) = 85
